// SBML level 2 version 4

model Jiang2007_GSISsystem_PancreaticBetaCells()
  // This a model from the article:
  // A kinetic core model of the glucose-stimulated insulin secretion network of pancreatic beta cells.
  // Jiang N, Cox RD, Hancock JM Mamm. Genome2007 Jul; Volume: 18 (Issue: 6-7): 508-20 17514510 ,
  // Abstract:
  // The construction and characterization of a core kinetic model of the glucose-stimulated insulin secretion system (GSIS) in pancreatic beta cells is described. The model consists of 44 enzymatic reactions, 59 metabolic state variables, and 272 parameters. It integrates five subsystems: glycolysis, the TCA cycle, the respiratory chain, NADH shuttles, and the pyruvate cycle. It also takes into account compartmentalization of the reactions in the cytoplasm and mitochondrial matrix. The model shows expected behavior in its outputs, including the response of ATP production to starting glucose concentration and the induction of oscillations of metabolite concentrations in the glycolytic pathway and in ATP and ADP concentrations. Identification of choke points and parameter sensitivity analysis indicate that the glycolytic pathway, and to a lesser extent the TCA cycle, are critical to the proper behavior of the system, while parameters in other components such as the respiratory chain are less critical. Notably, however, sensitivity analysis identifies the first reactions of nonglycolytic pathways as being important for the behavior of the system. The model is robust to deletion of malic enzyme activity, which is absent in mouse pancreatic beta cells. The model represents a step toward the construction of a model with species-specific parameters that can be used to understand mouse models of diabetes and the relationship of these mouse models to the human disease state.
  // The model reproduces Figure 2 of the paper, and is built using files ModelNNT11.xml and changed.m available from http://www.har.mrc.ac.uk/research/bioinformatics/research_areas/systems_biology.html. A couple of small errors in the model (in the original SBML file - ModelNNT11.xml) have been corrected. The errors are
  // - v44 now produces Pyr rather than PYR
  // - the kinetic law of v27 is now dependent on cytoplasmic (rather than mitochondrial) acetyl CoA and OXA
  // This model originates from BioModels Database: A Database of Annotated Published Models. It is copyright (c) 2005-2010 The BioModels Team.
  // For more information see the terms of use.
  // To cite BioModels Database, please use Le Novère N., Bornstein B., Broicher A., Courtot M., Donizelli M., Dharuri H., Li L., Sauro H., Schilstra M., Shapiro B., Snoep J.L., Hucka M. (2006) BioModels Database: A Free, Centralized Database of Curated, Published, Quantitative Kinetic Models of Biochemical and Cellular Systems Nucleic Acids Res., 34: D689-D691.

  // Compartments:
  compartment CYTOPLASM = 1; CYTOPLASM is "cytoplasm";  // GO:0005737
  compartment MT_IMS = 1; MT_IMS is "mitochondrial intermembrane space";  // GO:0005758
  compartment MT_IM = 1; MT_IM is "mitochondrial inner membrane";  // GO:0005743
  compartment MATRIX = 1; MATRIX is "mitochondrial matrix";  // GO:0005759

  // Species:
  species GLC in CYTOPLASM = 1.12817e-5; GLC is "glucose";  // kegg.compound:C00267
  species F6P in CYTOPLASM = 0.00065939; F6P is "fructose-6-phosphate";  // kegg.compound:C00085
  species FBP in CYTOPLASM = 7.70135e-6; FBP is "fructose-1,6-bisphosphate";  // kegg.compound:C00354
  species GAP in CYTOPLASM = 1.90919e-6; GAP is "glyceraldehyde 3-phosphate";  // kegg.compound:C00118
  species DPG in CYTOPLASM = 0.000299109; DPG is "1,2-bisphospho-D-glycerate";  // kegg.compound:C00236
  species PEP in CYTOPLASM = 2.1125e-6; PEP is "phosphoenolpyruvate";  // kegg.compound:C00074
  species PYR_cyt in CYTOPLASM = 4.22702e-6; PYR_cyt is "pyruvate";  // kegg.compound:C00022
  species AMP in CYTOPLASM = 2.61149e-6; AMP is "adenine monophosphate";  // kegg.compound:C00020
  species LAC in CYTOPLASM = 0.00033981; LAC is "lactate";  // kegg.compound:C00186
  species G3P in CYTOPLASM = 0.0076925; G3P is "glycerol-3-phosphate";  // kegg.compound:C00093
  species DHAP in CYTOPLASM = 0.0076925; DHAP is "dihydrohxyacetone-phosphate";  // kegg.compound:C00111
  species OXA_cyt in CYTOPLASM = 4e-6; OXA_cyt is "oxaloacetate";  // kegg.compound:C00036
  species Asp_cyt in CYTOPLASM = 0.00114; Asp_cyt is "aspartate";  // kegg.compound:C00049
  species Glu_cyt in CYTOPLASM = 0.00303; Glu_cyt is "glutamate";  // kegg.compound:C00025
  species OG_cyt in CYTOPLASM = 2.1e-5; OG_cyt is "oxoglutarate";  // kegg.compound:C00026
  species Mal_cyt in CYTOPLASM = 0.0005; Mal_cyt is "malate";  // kegg.compound:C00149
  species Acetyl_CoA_cyt in CYTOPLASM = 3e-5; Acetyl_CoA_cyt is "acetyl CoA";  // kegg.compound:C00024
  species CoA_cyt in CYTOPLASM = 0.000272; CoA_cyt is "coenzyme A";  // kegg.compound:C00010
  species IsoCitcyt in CYTOPLASM = 0.00042; IsoCitcyt is "isocitrate";  // kegg.compound:C00311
  species Cit_cyt in CYTOPLASM = 0.00042; Cit_cyt is "citrate";  // kegg.compound:C00158
  species ATP_cyt in CYTOPLASM = 0.00449064; ATP_cyt is "adenine triphosphate";  // kegg.compound:C0002
  species ADP_cyt in CYTOPLASM = 0.000108367; ADP_cyt is "adenine diphosphate";  // kegg.compound:C0008
  species NAD in CYTOPLASM = 0.00362057;  // kegg.compound:C00003; CHEBI:15846
  species NADH_cyt in CYTOPLASM = 0.000616118;  // kegg.compound:C00004; CHEBI:16908
  species NADP_cyt in CYTOPLASM = 0.00362057;  // kegg.compound:C00006; CHEBI:18009
  species NADPH_cyt in CYTOPLASM = 0.000616118;  // kegg.compound:C00005; CHEBI:16474
  species Pyr in MATRIX = 0.001025; Pyr is "pyruvate";  // kegg.compound:C00022
  species CO2 in MATRIX = 0.00163; CO2 is "carbon dioxide";  // kegg.compound:C00011
  species CoA in MATRIX = 0.000272; CoA is "coenzyme A";  // kegg.compound:C00010
  species Acetyl_CoA in MATRIX = 3e-5; Acetyl_CoA is "acetyl CoA";  // kegg.compound:C00024
  species Pi in MATRIX = 0.004; Pi is "phosphate";  // kegg.compound:C00009
  species Fum in MATRIX = 6.5e-5; Fum is "fumarate";  // kegg.compound:C00122
  species SCoA in MATRIX = 0.0002941; SCoA is "succinyl-CoA";  // kegg.compound:C00091
  species Suc in MATRIX = 0.00295; Suc is "succinate";  // kegg.compound:C00042
  species GTP in MATRIX = 0.0045; GTP is "guanosine triphosphate";  // kegg.compound:C00044
  species GDP in MATRIX = 0.00045; GDP is "guanosine diphosphate";  // kegg.compound:C00035
  species Ala in MATRIX = 0.00344; Ala is "slanine";  // kegg.compound:C00041
  species Asp in MATRIX = 0.00114; Asp is "aspartate";  // kegg.compound:C00049
  species Glu in MATRIX = 0.00303; Glu is "glutamate";  // kegg.compound:C00025
  species H2O in MATRIX = 0.001; H2O is "water";  // kegg.compound:C00001
  species ETFred in MATRIX = 0.00031; ETFred is "electron transfer flavoprotein (reduced form)";  // kegg.compound:C04570
  species ETFox in MATRIX = 0.00032; ETFox is "electron transfer flavoprotein (oxidised form)";  // kegg.compound:C04253
  species FADH2 in MATRIX = 7.2e-5;  // kegg.compound:C01352
  species FAD in MATRIX = 0.00101;  // kegg.compound:C00016
  species OG in MATRIX = 2.1e-5; OG is "oxoglutarate";  // kegg.compound:C00026
  species Mal in MATRIX = 0.0005; Mal is "malate";  // kegg.compound:C00149
  species OXA in MATRIX = 4e-6; OXA is "oxaloacetate";  // kegg.compound:C00036
  species Cit in MATRIX = 0.00042; Cit is "citrate";  // kegg.compound:C00158
  species IsoCit in MATRIX = 0.00042; IsoCit is "isocitrate";  // kegg.compound:C00311
  species ATP in MATRIX = 0.0045; ATP is "adenine triphosphate";  // kegg.compound:C0002
  species ADP in MATRIX = 0.00045; ADP is "adenine diphosphate";  // kegg.compound:C0008
  species NADP_p in MATRIX = 0.0101; NADP_p is "NADP+";  // kegg.compound:C00006
  species NADPH in MATRIX = 7.2e-5;  // kegg.compound:C00005
  species NAD_p in MATRIX = 0.0101; NAD_p is "NAD+";  // kegg.compound:C00003
  species NADH in MATRIX = 0.00072;  // kegg.compound:C00004
  species Q in MT_IMS = 0.026; Q is "ubiquinone";  // kegg.compound:C00399; CHEBI:16389
  species QH2 in MT_IMS = 0.028; QH2 is "ubiquinol";  // kegg.compound:C00390; CHEBI:17976
  species Cytc3p in MT_IMS = 0.003; Cytc3p is "ferrocytochrome c";  // kegg.compound:C00126; CHEBI:16928
  species Cytc2p in MT_IMS = 0.00011; Cytc2p is "ferricytochrome c";  // kegg.compound:C00125; CHEBI:15991

  // Parameters:
  flow = 0.011;

  // Reactions:
  GLCflow: -> GLC; CYTOPLASM*(Glc_F*10^(-3) - GLC)*flow;
    Glc_F = 64.941;
  LACflow: LAC => ; CYTOPLASM*LAC*flow;
  GAPflow: GAP => ; CYTOPLASM*GAP*flow;
  glucokinase: GLC + ATP_cyt => F6P + ADP_cyt; CYTOPLASM*(V1*ATP_cyt*GLC/((K1GLC + GLC)*(K1ATP + ATP_cyt)));  // ec-code:2.7.1.2
    V1 = 0.0005; K1GLC = 0.0001; K1ATP = 6.3e-5;
  _6_phosphofructokinase: F6P + ATP_cyt => FBP + ADP_cyt; CYTOPLASM*(V2*ATP_cyt*F6P^2/((K2*(1 + _6_phosphofructokinase_k2*(ATP_cyt/AMP)^2) + F6P^2)*(K2ATP + ATP_cyt))); _6_phosphofructokinase is "6-phosphofructokinase";  // modifiers: AMP; ec-code:2.7.1.11
    V2 = 0.0015; K2 = 1.6e-9; _6_phosphofructokinase_k2 = 0.017; K2ATP = 1e-5;
  fructose_bisphosphate_aldolase: FBP -> 2 GAP; CYTOPLASM*(k3f*FBP - k3b*GAP^2); fructose_bisphosphate_aldolase is "fructose-bisphosphate aldolase";  // ec-code:4.1.2.13
    k3f = 1; k3b = 0.05;
  v4: GAP + NAD => DPG + NADH_cyt; CYTOPLASM*(V4*NAD*GAP/((K4GAP + GAP)*(K4NAD + NAD))); v4 is "glyceraldehyde 3-phosphate dehydrogenase";  // ec-code:1.2.1.12
    V4 = 0.01; K4GAP = 0.001; K4NAD = 0.001;
  v5: DPG + ADP_cyt -> PEP + ATP_cyt; CYTOPLASM*(k5f*DPG*ADP_cyt - k5b*PEP*ATP_cyt); v5 is "bisphosphoglycerate phosphotase (1/2)";  // ec-code:5.4.2.1 ec-code:5.4.2.4
    k5f = 1000; k5b = 500;
  pyruvate_kinase: PEP + ADP_cyt => PYR_cyt + ATP_cyt; CYTOPLASM*(V6*ADP_cyt*PEP/((K6PEP + PEP)*(K6ADP + ADP_cyt)));  // ec-code:2.7.1.40
    V6 = 0.01; K6PEP = 0.0002; K6ADP = 0.0003;
  lactate_dehydrogenase: PYR_cyt + NADH_cyt -> LAC + NAD; CYTOPLASM*(k8f*NADH_cyt*PYR_cyt - k8b*NAD*LAC);  // ec-code:1.1.1.27
    k8f = 1000; k8b = 0.143;
  hidden_1: AMP + ATP_cyt -> 2 ADP_cyt; CYTOPLASM*(k9f*AMP*ATP_cyt - k9b*ADP_cyt^2);  // isVersionOf GO:0004017
    k9f = 10000; k9b = 10000;
  pyruvate_carrier: PYR_cyt -> Pyr; MATRIX*(pyruvate_carrier_V*PYR_cyt*v8_PYC/(pyruvate_carrier_K + PYR_cyt));  // isVersionOf GO:0005477
    pyruvate_carrier_V = 1e-8; pyruvate_carrier_K = 1.5e-7; v8_PYC = 0.00033211;
  pyruvate_dehydrogenase_complex: Pyr + CoA + NAD_p => CO2 + Acetyl_CoA + NADH; MATRIX*(pyruvate_dehydrogenase_complex_KcF*v9_PDC*Pyr*CoA*NAD_p/(pyruvate_dehydrogenase_complex_KmC*Pyr*CoA + pyruvate_dehydrogenase_complex_KmB*Pyr*NAD_p + pyruvate_dehydrogenase_complex_KmA*CoA*NAD_p + Pyr*CoA*NAD_p + pyruvate_dehydrogenase_complex_KmA*pyruvate_dehydrogenase_complex_KmP*pyruvate_dehydrogenase_complex_Kib*pyruvate_dehydrogenase_complex_Kic/pyruvate_dehydrogenase_complex_KmR/pyruvate_dehydrogenase_complex_Kip/pyruvate_dehydrogenase_complex_Kiq*Acetyl_CoA*NADH + pyruvate_dehydrogenase_complex_KmC/pyruvate_dehydrogenase_complex_Kir*Pyr*CoA*NADH + pyruvate_dehydrogenase_complex_KmB/pyruvate_dehydrogenase_complex_Kiq*Pyr*NAD_p*Acetyl_CoA + pyruvate_dehydrogenase_complex_KmA*pyruvate_dehydrogenase_complex_KmP*pyruvate_dehydrogenase_complex_Kib*pyruvate_dehydrogenase_complex_Kic/pyruvate_dehydrogenase_complex_KmR/pyruvate_dehydrogenase_complex_Kip/pyruvate_dehydrogenase_complex_Kia/pyruvate_dehydrogenase_complex_Kiq*Pyr*Acetyl_CoA*NADH));  // ec-code:1.2.4.1
    pyruvate_dehydrogenase_complex_KmA = 2.5e-5; pyruvate_dehydrogenase_complex_KmB = 1.3e-5; pyruvate_dehydrogenase_complex_KmC = 5e-5; pyruvate_dehydrogenase_complex_KmP = 5.9e-7; pyruvate_dehydrogenase_complex_KmR = 6.9e-7; pyruvate_dehydrogenase_complex_Kia = 0.00055; pyruvate_dehydrogenase_complex_Kib = 0.0003; pyruvate_dehydrogenase_complex_Kic = 0.00018; pyruvate_dehydrogenase_complex_Kip = 6e-5; pyruvate_dehydrogenase_complex_Kiq = 3.5e-5; pyruvate_dehydrogenase_complex_Kir = 3.6e-5; pyruvate_dehydrogenase_complex_KcF = 856; v9_PDC = 3.8617e-7;
  v10: OXA + Acetyl_CoA -> Cit + CoA; MATRIX*(v10_V*Acetyl_CoA*OXA*v10_v10_CS/(Acetyl_CoA*OXA + v10_Ka*OXA + v10_Kb*Acetyl_CoA + v10_Kia*v10_Kib)); v10 is "citrate synthase";  // ec-code:2.3.3.1+ ec-code:2.3.3.3
    v10_V = 0.005267; v10_Ka = 1.18e-5; v10_Kb = 4.8e-6; v10_Kia = 1e-5; v10_Kib = 4e-6; v10_v10_CS = 3.8617e-7;
  v11: Cit -> IsoCit; MATRIX*((v11_KcF*v11_Kp*Cit - v11_KcR*v11_Ks*IsoCit)*v11_ACO/(v11_Ks*IsoCit + v11_Kp*Cit + v11_Ks*v11_Kp)); v11 is "aconitase";  // ec-code:4.2.1.3
    v11_Ks = 0.0005; v11_Kp = 0.00011; v11_KcF = 20.47; v11_KcR = 31.44; v11_ACO = 3.8617e-7;
  v12: IsoCit + NAD_p => OG + NADH; MATRIX*(v12_KcF*v12_IDHa*(IsoCit*IsoCit + b*ADP*IsoCit)/(IsoCit*IsoCit + c*IsoCit + d*ADP + e*ADP*IsoCit + f)); v12 is "isocitrate dehydrogenase (NAD+) (alpha/beta/gamma)";  // modifiers: ADP; ec-code:1.1.1.41
    v12_KcF = 105; b = 29.6; c = 0.00023; d = 7.8e-5; e = 0.00064; f = 0.00036; v12_IDHa = 3.8617e-7;
  v14: OG + CoA + NAD_p => CO2 + SCoA + NADH; MATRIX*(v14_KcF*v14_OGDC*OG*CoA*NAD_p/(v14_KmC*OG*CoA + v14_KmB*OG*NAD_p + v14_KmA*CoA*NAD_p + OG*CoA*NAD_p + v14_KmA*v14_KmP*v14_Kib*v14_Kic/v14_KmR/v14_Kip/v14_Kiq*SCoA*NADH + v14_KmC/v14_Kir*OG*CoA*NADH + v14_KmB/v14_Kiq*OG*NAD_p*SCoA + v14_KmA*v14_KmP*v14_Kib*v14_Kic/v14_KmR/v14_Kip/v14_Kia/v14_Kiq*OG*SCoA*NADH)); v14 is "oxoglutarate dehydrogenase complex";  // ec-code:1.2.4.2
    v14_KmA = 0.00022; v14_KmB = 2.5e-5; v14_KmC = 5e-5; v14_KmP = 0.0003; v14_KmR = 0.0006; v14_Kia = 0.00072; v14_Kib = 0.00074; v14_Kic = 0.0001; v14_Kip = 1.1e-6; v14_Kiq = 8.1e-5; v14_Kir = 2.5e-5; v14_KcF = 177; v14_OGDC = 3.8617e-7;
  succinyl_CoA_synthetase: GDP + SCoA + Pi -> Suc + GTP + CoA; MATRIX*((GDP*SCoA*pi - Suc*GTP*CoA/succinyl_CoA_synthetase_Keq)*(Kc1*v15_SCS + Kc2*v15_SCS*(succinyl_CoA_synthetase_KmC*Suc/KmC2*succinyl_CoA_synthetase_Kip + pi/KmC2))/(succinyl_CoA_synthetase_Kia*succinyl_CoA_synthetase_KmB*pi + succinyl_CoA_synthetase_KmB*GDP*pi + succinyl_CoA_synthetase_KmA*SCoA*pi + succinyl_CoA_synthetase_KmC*GDP*SCoA + GDP*SCoA*pi + GDP*SCoA*pi*pi/KmC2 + succinyl_CoA_synthetase_Kia*succinyl_CoA_synthetase_KmB*succinyl_CoA_synthetase_KmC*Suc/succinyl_CoA_synthetase_Kip + succinyl_CoA_synthetase_Kia*succinyl_CoA_synthetase_KmB*succinyl_CoA_synthetase_KmC*Suc*GTP/succinyl_CoA_synthetase_Kip/succinyl_CoA_synthetase_Kiq + succinyl_CoA_synthetase_Kia*succinyl_CoA_synthetase_KmB*succinyl_CoA_synthetase_KmC*Suc*CoA/succinyl_CoA_synthetase_Kip/succinyl_CoA_synthetase_Kir + succinyl_CoA_synthetase_Kia*succinyl_CoA_synthetase_KmB*succinyl_CoA_synthetase_Kic*GTP*CoA/succinyl_CoA_synthetase_KmQ/succinyl_CoA_synthetase_Kir + succinyl_CoA_synthetase_Kia*succinyl_CoA_synthetase_KmB*succinyl_CoA_synthetase_KmC*Suc*GTP*CoA/succinyl_CoA_synthetase_Kip/succinyl_CoA_synthetase_KmQ/succinyl_CoA_synthetase_Kir + succinyl_CoA_synthetase_Kia*succinyl_CoA_synthetase_KmB*succinyl_CoA_synthetase_KmC*Suc*Suc*GTP*CoA/succinyl_CoA_synthetase_Kip/succinyl_CoA_synthetase_KmP2/succinyl_CoA_synthetase_KmQ/succinyl_CoA_synthetase_Kir + succinyl_CoA_synthetase_Kia*succinyl_CoA_synthetase_KmB*pi*GTP/succinyl_CoA_synthetase_Kiq + succinyl_CoA_synthetase_Kia*succinyl_CoA_synthetase_KmB*pi*CoA/succinyl_CoA_synthetase_Kir + succinyl_CoA_synthetase_Kia*succinyl_CoA_synthetase_KmB*pi*GTP*CoA/succinyl_CoA_synthetase_KmQ/succinyl_CoA_synthetase_Kir + succinyl_CoA_synthetase_Kia*succinyl_CoA_synthetase_KmB*pi*Suc*GTP*CoA/succinyl_CoA_synthetase_KmP2/succinyl_CoA_synthetase_KmQ/succinyl_CoA_synthetase_Kir + succinyl_CoA_synthetase_KmB*succinyl_CoA_synthetase_KmC*GDP*Suc/succinyl_CoA_synthetase_Kip + succinyl_CoA_synthetase_KmA*succinyl_CoA_synthetase_KmC*SCoA*Suc/succinyl_CoA_synthetase_Kip + succinyl_CoA_synthetase_KmC*GDP*SCoA*Suc/succinyl_CoA_synthetase_Kip + succinyl_CoA_synthetase_KmC*GDP*SCoA*pi*Suc/KmC2/succinyl_CoA_synthetase_Kip + succinyl_CoA_synthetase_KmA*SCoA*pi*GTP/succinyl_CoA_synthetase_Kiq + succinyl_CoA_synthetase_KmB*GDP*pi*CoA/succinyl_CoA_synthetase_Kir + succinyl_CoA_synthetase_KmA*succinyl_CoA_synthetase_KmC*SCoA*Suc*GTP/succinyl_CoA_synthetase_Kip/succinyl_CoA_synthetase_Kiq + succinyl_CoA_synthetase_KmB*succinyl_CoA_synthetase_KmC*GDP*Suc*CoA/succinyl_CoA_synthetase_Kip/succinyl_CoA_synthetase_Kir)); succinyl_CoA_synthetase is "succinyl-CoA synthetase";  // ec-code:6.2.1.4
    succinyl_CoA_synthetase_KmA = 5e-6; succinyl_CoA_synthetase_KmB = 3.5e-5; succinyl_CoA_synthetase_KmC = 0.00045; succinyl_CoA_synthetase_KmP = 0.0006; succinyl_CoA_synthetase_KmQ = 7.5e-6; KmC2 = 0.00045; succinyl_CoA_synthetase_KmP2 = 0.0006; succinyl_CoA_synthetase_Keq = 8.375; succinyl_CoA_synthetase_Kia = 0.0004; succinyl_CoA_synthetase_Kib = 2e-5; succinyl_CoA_synthetase_Kic = 3e-5; succinyl_CoA_synthetase_Kip = 0.07; succinyl_CoA_synthetase_Kiq = 5e-6; succinyl_CoA_synthetase_Kir = 6.7e-6; Kc1 = 100; Kc2 = 100; v15_SCS = 3.8617e-7;
  succinate_dehydrogenase: Suc + Q -> Fum + QH2; MATRIX*(succinate_dehydrogenase_KcF*succinate_dehydrogenase_KcR*v16_SDH*(Suc*Q - Fum*QH2/succinate_dehydrogenase_Keq)/(succinate_dehydrogenase_KcR*succinate_dehydrogenase_KmS2*Suc + succinate_dehydrogenase_KcR*succinate_dehydrogenase_KmS1*Q + succinate_dehydrogenase_KcF*succinate_dehydrogenase_KmP2*Fum/succinate_dehydrogenase_Keq + succinate_dehydrogenase_KcF*succinate_dehydrogenase_KmP1*QH2/succinate_dehydrogenase_Keq + succinate_dehydrogenase_KcR*Suc*Q + succinate_dehydrogenase_KcF*succinate_dehydrogenase_KmP2*Suc*Fum/(succinate_dehydrogenase_Keq*succinate_dehydrogenase_KiS1) + succinate_dehydrogenase_KcF*Fum*QH2/succinate_dehydrogenase_Keq + succinate_dehydrogenase_KcR*succinate_dehydrogenase_KmS1*Q*QH2/succinate_dehydrogenase_KiP2));  // ec-code:1.3.5.1
    succinate_dehydrogenase_KmS1 = 3e-5; succinate_dehydrogenase_KmS2 = 6.9e-5; succinate_dehydrogenase_KmP1 = 3e-7; succinate_dehydrogenase_KmP2 = 1.5e-6; succinate_dehydrogenase_KiS1 = 4.1e-6; succinate_dehydrogenase_KiP2 = 5.6e-6; succinate_dehydrogenase_Keq = 0.037; succinate_dehydrogenase_KcF = 69.3; succinate_dehydrogenase_KcR = 1.73; v16_SDH = 9.9211e-5;
  fumarase: Fum -> Mal; MATRIX*((fumarase_KcF*fumarase_Kp*Fum - fumarase_KcR*fumarase_Ks*Mal)*v17_FM/(fumarase_Ks*Mal + fumarase_Kp*Fum + fumarase_Ks*fumarase_Kp));  // ec-code:4.2.1.2
    fumarase_Kp = 2.5e-5; fumarase_Ks = 5e-6; fumarase_KcF = 800; fumarase_KcR = 900; v17_FM = 3.8617e-7;
  v18: Mal + NAD_p -> NADH + OXA; MATRIX*((v18_KcF*Mal*NAD_p/v18_KiS1/v18_KmS2 - v18_KcR*OXA*NADH/v18_KmP1/v18_KiP2)*v18_MDH/(1 + Mal/v18_KiS1 + v18_KmS1*NAD_p/v18_KiS1/v18_KmS2 + v18_KmP2*OXA/v18_KmP1/v18_KiP2 + NADH/v18_KiP2 + Mal*NAD_p/v18_KiS1/v18_KmS2 + v18_KmP2*Mal*OXA/v18_KiS1/v18_KmP1/v18_KiP2 + v18_KmS1*NAD_p*NADH/v18_KiS1/v18_KmS2/v18_KiP2 + OXA*NADH/v18_KmP1*v18_KiP2 + Mal*NAD_p*OXA/v18_KiS1/v18_KmS2/v18_KiP1 + NAD_p*OXA*NADH/v18_KiS2/v18_KmP1/v18_KiP2)); v18 is "malate dehydrogenase (mitochondrion)";  // ec-code:1.1.1.37
    v18_KmS1 = 7.2e-5; v18_KmS2 = 0.00011; v18_KmP1 = 0.0016; v18_KmP2 = 0.00017; v18_KiS1 = 1.1e-5; v18_KiS2 = 0.0001; v18_KiP1 = 0.0071; v18_KiP2 = 0.0019; v18_KcF = 0.39; v18_KcR = 0.04; v18_MDH = 3.8617e-7;
  alanine_transaminase: Ala + OG -> Glu + Pyr; MATRIX*(alanine_transaminase_KcF*alanine_transaminase_KcR*v20_AlaTA*(Ala*OG - Glu*Pyr/alanine_transaminase_Keq)/(alanine_transaminase_KcR*alanine_transaminase_KmS2*Ala + alanine_transaminase_KcR*alanine_transaminase_KmS1*OG + alanine_transaminase_KcF*alanine_transaminase_KmP2*Glu/alanine_transaminase_Keq + alanine_transaminase_KcF*alanine_transaminase_KmP1*Pyr/alanine_transaminase_Keq + alanine_transaminase_KcR*Ala*OG + alanine_transaminase_KcF*alanine_transaminase_KmP2*Ala*Glu/(alanine_transaminase_Keq*alanine_transaminase_KiS1) + alanine_transaminase_KcF*Glu*Pyr/alanine_transaminase_Keq + alanine_transaminase_KcR*alanine_transaminase_KmS1*OG*Pyr/alanine_transaminase_KiP2));  // ec-code:2.6.1.2
    alanine_transaminase_KmS1 = 0.002; alanine_transaminase_KmS2 = 0.0004; alanine_transaminase_KmP1 = 0.032; alanine_transaminase_KmP2 = 0.0004; alanine_transaminase_KiS1 = 0.0087; alanine_transaminase_KiP2 = 0.012; alanine_transaminase_Keq = 0.69; alanine_transaminase_KcF = 337; alanine_transaminase_KcR = 0.15; v20_AlaTA = 3.8617e-7;
  v21: OXA + Glu -> Asp + OG; MATRIX*(v21_KcF*v21_KcR*v21_AspTA*(OXA*Glu - Asp*OG/v21_Keq)/(v21_KcR*v21_KmS2*OXA + v21_KcR*v21_KmS1*Glu + v21_KcF*v21_KmP2*Asp/v21_Keq + v21_KcF*v21_KmP1*OG/v21_Keq + v21_KcR*OXA*Glu + v21_KcF*v21_KmP2*OXA*Asp/(v21_Keq*v21_KiS1) + v21_KcF*Asp*OG/v21_Keq + v21_KcR*v21_KmS1*Glu*OG/v21_KiP2)); v21 is "aspartate transaminase";  // ec-code:2.6.1.1
    v21_KmS1 = 0.0009; v21_KmS2 = 0.0001; v21_KmP1 = 4e-5; v21_KmP2 = 0.004; v21_KiS1 = 0.002; v21_KiP2 = 0.0083; v21_Keq = 6.2; v21_KcF = 300; v21_KcR = 1000; v21_AspTA = 3.8617e-7;
  aspartate_glutamate_carrier: Glu_cyt + Asp -> Asp_cyt + Glu; MATRIX*((Asp*Glu_cyt/aspartate_glutamate_carrier_alpha/aspartate_glutamate_carrier_KiS1/aspartate_glutamate_carrier_KiS2*aspartate_glutamate_carrier_KcF - Glu*Asp_cyt/aspartate_glutamate_carrier_beta/aspartate_glutamate_carrier_KiP1/aspartate_glutamate_carrier_KiP2*aspartate_glutamate_carrier_KcR)*v22_AGC/(1 + Asp/aspartate_glutamate_carrier_KiS1 + Glu_cyt/aspartate_glutamate_carrier_KiS2 + Glu/aspartate_glutamate_carrier_KiP1 + Asp_cyt/aspartate_glutamate_carrier_KiP2 + Asp*Glu_cyt/aspartate_glutamate_carrier_alpha/aspartate_glutamate_carrier_KiS1/aspartate_glutamate_carrier_KiS2 + Glu*Asp_cyt/aspartate_glutamate_carrier_beta/aspartate_glutamate_carrier_KiP1/aspartate_glutamate_carrier_KiP2 + Glu_cyt*Asp_cyt/aspartate_glutamate_carrier_gamma/aspartate_glutamate_carrier_KiS2/aspartate_glutamate_carrier_KiP2 + Asp*Glu/aspartate_glutamate_carrier_delta/aspartate_glutamate_carrier_KiS1/aspartate_glutamate_carrier_KiP1)); aspartate_glutamate_carrier is "aspartate/glutamate carrier";
    aspartate_glutamate_carrier_KiS1 = 8e-5; aspartate_glutamate_carrier_KiS2 = 0.0032; aspartate_glutamate_carrier_KiP1 = 0.00018; aspartate_glutamate_carrier_KiP2 = 0.0028; aspartate_glutamate_carrier_KcF = 10; aspartate_glutamate_carrier_KcR = 10; aspartate_glutamate_carrier_alpha = 1; aspartate_glutamate_carrier_beta = 1; aspartate_glutamate_carrier_gamma = 1; aspartate_glutamate_carrier_delta = 1; v22_AGC = 0.00033211;
  NADH_ubiquinone_oxidoreductase: NADH + Q -> NAD_p + QH2; MATRIX*(NADH_ubiquinone_oxidoreductase_KcF*NADH_ubiquinone_oxidoreductase_KcR*v24_Complex_I*(NADH*Q - NAD_p*QH2/NADH_ubiquinone_oxidoreductase_Keq)/(NADH_ubiquinone_oxidoreductase_KcR*NADH_ubiquinone_oxidoreductase_KmS2*NADH + NADH_ubiquinone_oxidoreductase_KcR*NADH_ubiquinone_oxidoreductase_KmS1*Q + NADH_ubiquinone_oxidoreductase_KcF*NADH_ubiquinone_oxidoreductase_KmP2*NAD_p/NADH_ubiquinone_oxidoreductase_Keq + NADH_ubiquinone_oxidoreductase_KcF*NADH_ubiquinone_oxidoreductase_KmP1*QH2/NADH_ubiquinone_oxidoreductase_Keq + NADH_ubiquinone_oxidoreductase_KcR*NADH*Q + NADH_ubiquinone_oxidoreductase_KcF*NADH_ubiquinone_oxidoreductase_KmP2*NADH*NAD_p/(NADH_ubiquinone_oxidoreductase_Keq*NADH_ubiquinone_oxidoreductase_KiS1) + NADH_ubiquinone_oxidoreductase_KcF*NAD_p*QH2/NADH_ubiquinone_oxidoreductase_Keq + NADH_ubiquinone_oxidoreductase_KcR*NADH_ubiquinone_oxidoreductase_KmS1*Q*QH2/NADH_ubiquinone_oxidoreductase_KiP2)); NADH_ubiquinone_oxidoreductase is "NADH:ubiquinone oxidoreductase";  // ec-code:2.7.4.6
    NADH_ubiquinone_oxidoreductase_KmS1 = 9.2e-6; NADH_ubiquinone_oxidoreductase_KmS2 = 0.00026; NADH_ubiquinone_oxidoreductase_KmP1 = 9.9e-6; NADH_ubiquinone_oxidoreductase_KmP2 = 5.9e-5; NADH_ubiquinone_oxidoreductase_KiS1 = 2.1e-8; NADH_ubiquinone_oxidoreductase_KiP2 = 9.8e-8; NADH_ubiquinone_oxidoreductase_Keq = 407.9; NADH_ubiquinone_oxidoreductase_KcF = 498; NADH_ubiquinone_oxidoreductase_KcR = 229; v24_Complex_I = 0.00033211;
  v25: QH2 + 2 Cytc3p => Q + 2 Cytc2p; MT_IMS*(v25_KcF*v25_Complex_III*QH2*Cytc3p/((v25_KmA*Kq2*Kb2 + v25_KmA*Kq2*Cytc3p + v25_KcF/k8*Kq1*QH2*Kb1 + v25_KcF/k8*Kq1*QH2*Cytc3p)*Cytc2p + v25_KmA*Cytc3p + v25_KmB*QH2 + QH2*Cytc3p)); v25 is "ubiquinol:cytochrome c oxidoreductase";  // ec-code:1.10.2.2
    v25_KmA = 2.8e-5; v25_KmB = 3e-6; Kb1 = 5.4e-6; Kb2 = 5.7e-6; Kq1 = 2.8e-6; Kq2 = 1.9e-6; k8 = 622.1; v25_KcF = 426.8; v25_Complex_III = 9.963e-9;
  cytochrome_c_oxidase: Cytc2p => Cytc3p; MT_IMS*(cytochrome_c_oxidase_KcF*v26_Complex_IV*Cytc2p/(cytochrome_c_oxidase_Ks + Cytc2p));  // ec-code:1.9.3.1
    cytochrome_c_oxidase_Ks = 0.00011; cytochrome_c_oxidase_KcF = 0.000935; v26_Complex_IV = 0.002325;
  v27: Cit_cyt + CoA_cyt -> OXA_cyt + Acetyl_CoA_cyt; CYTOPLASM*Kid*Kc*(v27_V*Acetyl_CoA_cyt*OXA_cyt*v27_v10_CS/(Acetyl_CoA_cyt*OXA_cyt + v27_Ka*OXA_cyt + v27_Kb*Acetyl_CoA_cyt + v27_Kia*v27_Kib))/(v27_Keq*v27_Kia*v27_Kb); v27 is "citrate synthase";  // ec-code:2.3.3.1+ ec-code:2.3.3.3
    v27_V = 0.004833; v27_Ka = 5e-6; v27_Kb = 4.5e-6; Kc = 3.9e-5; v27_Kia = 5e-6; v27_Kib = 4.5e-6; Kid = 0.0043; v27_Keq = 18000000; v27_v10_CS = 3.8617e-7;
  ATPase_complex: ADP + Pi -> ATP + H2O; MATRIX*v28_Complex_V*ATPase_complex_V*ADP/(ATPase_complex_Km + ADP + ADP*ADP/Ki);  // ec-code:3.6.1.3 ec-code:3.6.1.5
    ATPase_complex_V = 0.075; ATPase_complex_Km = 0.0045; Ki = 0.047; v28_Complex_V = 0.0033211;
  v29: Cit_cyt -> IsoCitcyt; CYTOPLASM*((v29_KcF*v29_Kp*Cit_cyt - v29_KcR*v29_Ks*IsoCitcyt)*v29_ACO/(v29_Ks*IsoCitcyt + v29_Kp*Cit_cyt + v29_Ks*v29_Kp)); v29 is "aconitase";  // ec-code:4.2.1.3
    v29_Ks = 0.0005; v29_Kp = 0.00011; v29_KcF = 20.47; v29_KcR = 31.44; v29_ACO = 3.8617e-7;
  oxoglutarate_carrier: Mal_cyt + OG -> OG_cyt + Mal; MATRIX*((OG*Mal_cyt/oxoglutarate_carrier_alpha/oxoglutarate_carrier_KiS1/oxoglutarate_carrier_KiS2*oxoglutarate_carrier_KcF - Mal*OG_cyt/oxoglutarate_carrier_beta/oxoglutarate_carrier_KiP1/oxoglutarate_carrier_KiP2*oxoglutarate_carrier_KcR)*v30_OGC/(1 + OG/oxoglutarate_carrier_KiS1 + Mal_cyt/oxoglutarate_carrier_KiS2 + Mal/oxoglutarate_carrier_KiP1 + OG_cyt/oxoglutarate_carrier_KiP2 + OG*Mal_cyt/oxoglutarate_carrier_alpha/oxoglutarate_carrier_KiS1/oxoglutarate_carrier_KiS2 + Mal*OG_cyt/oxoglutarate_carrier_beta/oxoglutarate_carrier_KiP1/oxoglutarate_carrier_KiP2 + Mal_cyt*OG_cyt/oxoglutarate_carrier_gamma/oxoglutarate_carrier_KiS2/oxoglutarate_carrier_KiP2 + OG*Mal/oxoglutarate_carrier_delta/oxoglutarate_carrier_KiS1/oxoglutarate_carrier_KiP1));  // isVersionOf GO:0015367
    oxoglutarate_carrier_KiS1 = 0.0003; oxoglutarate_carrier_KiS2 = 0.0007; oxoglutarate_carrier_KiP1 = 0.0014; oxoglutarate_carrier_KiP2 = 0.00017; oxoglutarate_carrier_KcF = 3.675; oxoglutarate_carrier_KcR = 4.83; oxoglutarate_carrier_alpha = 1; oxoglutarate_carrier_beta = 1; oxoglutarate_carrier_gamma = 1; oxoglutarate_carrier_delta = 1; v30_OGC = 0.00033211;
  malate_dehydrogenase_cytosol: NADH_cyt + OXA_cyt => Mal_cyt + NAD; CYTOPLASM*(v31_MDH*(k1*malate_dehydrogenase_cytosol_k2*k3*k4*NADH_cyt*OXA_cyt - kminus1*kminus2*kminus3*kminus4*Mal_cyt*NAD)/(kminus1*(kminus2 + k3)*k4 + k1*(kminus2 + k3)*k4*NADH_cyt + kminus1*(kminus2 + k3)*kminus4*NAD + malate_dehydrogenase_cytosol_k2*k3*k4*OXA_cyt + kminus1*kminus2*kminus3*Mal_cyt + k1*malate_dehydrogenase_cytosol_k2*(k3 + k4)*NADH_cyt*OXA_cyt + (kminus1 + kminus2)*kminus3*kminus4*Mal_cyt*NAD + k1 + kminus2 + kminus3*NADH_cyt*Mal_cyt + k1*malate_dehydrogenase_cytosol_k2*kminus3*NADH_cyt*OXA_cyt*Mal_cyt + malate_dehydrogenase_cytosol_k2*k3*kminus4*OXA_cyt*NAD + malate_dehydrogenase_cytosol_k2*kminus3*kminus4*OXA_cyt*Mal_cyt*NAD)); malate_dehydrogenase_cytosol is "malate dehydrogenase (cytosol)";  // ec-code:1.1.1.37
    k1 = 34000000; malate_dehydrogenase_cytosol_k2 = 35000000; k3 = 4650; k4 = 214; kminus1 = 26; kminus2 = 1400; kminus3 = 570000; kminus4 = 260000; v31_MDH = 3.8617e-7;
  v32: Asp_cyt + OG_cyt -> OXA_cyt + Glu_cyt; CYTOPLASM*(v32_KcF*v32_KcR*v32_AspTA*(Asp_cyt*OG_cyt - OXA_cyt*Glu_cyt/v32_Keq)/(v32_KcR*v32_KmS2*Asp_cyt + v32_KcR*v32_KmS1*OG_cyt + v32_KcF*v32_KmP2*OXA_cyt/v32_Keq + v32_KcF*v32_KmP1*Glu_cyt/v32_Keq + v32_KcR*Asp_cyt*OG_cyt + v32_KcF*v32_KmP2*Asp_cyt*OXA_cyt/(v32_Keq*v32_KiS1) + v32_KcF*OXA_cyt*Glu_cyt/v32_Keq + v32_KcR*v32_KmS1*OG_cyt*Glu_cyt/v32_KiP2)); v32 is "aspartate transaminase";  // ec-code:2.6.1.1
    v32_KmS1 = 0.0009; v32_KmS2 = 0.0001; v32_KmP1 = 4e-5; v32_KmP2 = 0.004; v32_KiS1 = 0.002; v32_KiP2 = 0.0083; v32_Keq = 6.2; v32_KcF = 300; v32_KcR = 1000; v32_AspTA = 3.8617e-7;
  v33: Cit_cyt + Mal -> Mal_cyt + Cit; MATRIX*((Cit_cyt*Mal/v33_alpha/v33_KiS1/v33_KiS2*v33_KcF - Mal_cyt*Cit/v33_beta/v33_KiP1/v33_KiP2*v33_KcR)*v33_CIC/(1 + Cit_cyt/v33_KiS1 + Mal/v33_KiS2 + Mal_cyt/v33_KiP1 + Cit/v33_KiP2 + Cit_cyt*Mal/v33_alpha/v33_KiS1/v33_KiS2 + Mal_cyt*Cit/v33_beta/v33_KiP1/v33_KiP2 + Mal*Cit/v33_gamma/v33_KiS2/v33_KiP2 + Cit_cyt*Mal_cyt/v33_delta/v33_KiS1/v33_KiP1)); v33 is "citrate carrier";  // isVersionOf GO:0015137
    v33_KiS1 = 0.00013; v33_KiS2 = 0.00044; v33_KiP1 = 0.00033; v33_KiP2 = 4.18e-5; v33_KcF = 5.6; v33_KcR = 3.5; v33_alpha = 1; v33_beta = 1; v33_gamma = 1; v33_delta = 1; v33_CIC = 0.00033211;
  ETF_Q_oxidoreductase: ETFred + Q -> ETFox + QH2; MATRIX*(ETF_Q_oxidoreductase_KcF*ETF_Q_oxidoreductase_KcR*v34_ETF_QO*(ETFred*Q - ETFox*QH2/ETF_Q_oxidoreductase_Keq)/(ETF_Q_oxidoreductase_KcR*ETF_Q_oxidoreductase_KmS2*ETFred + ETF_Q_oxidoreductase_KcR*ETF_Q_oxidoreductase_KmS1*Q + ETF_Q_oxidoreductase_KcF*ETF_Q_oxidoreductase_KmP2*ETFox/ETF_Q_oxidoreductase_Keq + ETF_Q_oxidoreductase_KcF*ETF_Q_oxidoreductase_KmP1*QH2/ETF_Q_oxidoreductase_Keq + ETF_Q_oxidoreductase_KcR*ETFred*Q + ETF_Q_oxidoreductase_KcF*ETF_Q_oxidoreductase_KmP2*ETFred*ETFox/(ETF_Q_oxidoreductase_Keq*ETF_Q_oxidoreductase_KiS1) + ETF_Q_oxidoreductase_KcF*ETFox*QH2/ETF_Q_oxidoreductase_Keq + ETF_Q_oxidoreductase_KcR*ETF_Q_oxidoreductase_KmS1*Q*QH2/ETF_Q_oxidoreductase_KiP2)); ETF_Q_oxidoreductase is "ETF:Q oxidoreductase";  // ec-code:1.5.5.1
    ETF_Q_oxidoreductase_KmS1 = 3.1e-7; ETF_Q_oxidoreductase_KmS2 = 3.9e-7; ETF_Q_oxidoreductase_KmP1 = 3.2e-7; ETF_Q_oxidoreductase_KmP2 = 4.2e-9; ETF_Q_oxidoreductase_KiS1 = 3.1e-7; ETF_Q_oxidoreductase_KiP2 = 3e-7; ETF_Q_oxidoreductase_Keq = 0.66; ETF_Q_oxidoreductase_KcF = 78; ETF_Q_oxidoreductase_KcR = 101; v34_ETF_QO = 3.3211e-5;
  glutathione_reductase: FADH2 + ETFox -> ETFred + FAD; MATRIX*(glutathione_reductase_KcF*glutathione_reductase_KcR*v35_ACD*(FADH2*ETFox - ETFred*FAD/glutathione_reductase_Keq)/(glutathione_reductase_KcR*glutathione_reductase_KiS1*glutathione_reductase_KmS2 + glutathione_reductase_KcR*glutathione_reductase_KmS2*FADH2 + glutathione_reductase_KcR*glutathione_reductase_KmS1*ETFox + glutathione_reductase_KcF*glutathione_reductase_KmP2*ETFred/glutathione_reductase_Keq + glutathione_reductase_KcF*glutathione_reductase_KmP1*FAD/glutathione_reductase_Keq + glutathione_reductase_KcR*FADH2*ETFox + glutathione_reductase_KcF*glutathione_reductase_KmP2*FADH2*ETFred/(glutathione_reductase_Keq*glutathione_reductase_KiS1) + glutathione_reductase_KcF*ETFred*FAD/glutathione_reductase_Keq + glutathione_reductase_KcR*glutathione_reductase_KmS1*ETFox*FAD/glutathione_reductase_KiP2 + glutathione_reductase_KcR*FADH2*ETFox*ETFred/glutathione_reductase_KiP1 + glutathione_reductase_KcF*ETFox*ETFred*FAD/(glutathione_reductase_KiS2*glutathione_reductase_Keq)));  // ec-code:1.8.1.7
    glutathione_reductase_KmS1 = 3.9e-5; glutathione_reductase_KmS2 = 1.2e-7; glutathione_reductase_KmP1 = 1.08e-6; glutathione_reductase_KmP2 = 2.42e-5; glutathione_reductase_KiS1 = 7.6e-5; glutathione_reductase_KiS2 = 2.4e-7; glutathione_reductase_KiP1 = 7.53e-5; glutathione_reductase_KiP2 = 1.19e-5; glutathione_reductase_Keq = 8.99; glutathione_reductase_KcF = 2.18; glutathione_reductase_KcR = 0.3; v35_ACD = 3.3211e-5;
  pyruvate_decarboxylase: ATP + CO2 + Pyr -> Pi + ADP + OXA; MATRIX*(pyruvate_decarboxylase_KcF*pyruvate_decarboxylase_KcR*v36_PC*(ATP*CO2*Pyr - pi*ADP*OXA/pyruvate_decarboxylase_Keq)/(pyruvate_decarboxylase_Kia*pyruvate_decarboxylase_KmB*pyruvate_decarboxylase_KcR*Pyr + pyruvate_decarboxylase_KmC*pyruvate_decarboxylase_KcR*ATP*CO2 + pyruvate_decarboxylase_KmA*pyruvate_decarboxylase_KcR*CO2*Pyr + pyruvate_decarboxylase_KmB*pyruvate_decarboxylase_KcR*ATP*Pyr + pyruvate_decarboxylase_KcR*ATP*CO2*Pyr + pyruvate_decarboxylase_Kip*pyruvate_decarboxylase_KmQ*pyruvate_decarboxylase_KcF*OXA/pyruvate_decarboxylase_Keq + pyruvate_decarboxylase_KmQ*pyruvate_decarboxylase_KcF*pi*OXA/pyruvate_decarboxylase_Keq + pyruvate_decarboxylase_KmP*pyruvate_decarboxylase_KcF*ADP*OXA/pyruvate_decarboxylase_Keq + pyruvate_decarboxylase_KmR*pyruvate_decarboxylase_KcF*pi*ADP/pyruvate_decarboxylase_Keq + pyruvate_decarboxylase_KcF*pi*ADP*OXA/pyruvate_decarboxylase_Keq + pyruvate_decarboxylase_Kia*pyruvate_decarboxylase_KmB*pyruvate_decarboxylase_KcR*Pyr*pi/pyruvate_decarboxylase_Kip + pyruvate_decarboxylase_Kia*pyruvate_decarboxylase_KmB*pyruvate_decarboxylase_KcR*Pyr*ADP/pyruvate_decarboxylase_Kia + pyruvate_decarboxylase_Kiq*pyruvate_decarboxylase_KmP*pyruvate_decarboxylase_KcF*CO2*OXA/pyruvate_decarboxylase_Kib/pyruvate_decarboxylase_Keq + pyruvate_decarboxylase_Kia*pyruvate_decarboxylase_KmP*pyruvate_decarboxylase_KcF*ATP*OXA/pyruvate_decarboxylase_Kia/pyruvate_decarboxylase_Keq + pyruvate_decarboxylase_KmA*pyruvate_decarboxylase_KcR*ATP*CO2*OXA/pyruvate_decarboxylase_Kir + pyruvate_decarboxylase_KmR*pyruvate_decarboxylase_KcF*Pyr*pi*ADP/pyruvate_decarboxylase_Kic/pyruvate_decarboxylase_Keq + pyruvate_decarboxylase_KmA*pyruvate_decarboxylase_KcR*CO2*Pyr*ADP/pyruvate_decarboxylase_Kiq + pyruvate_decarboxylase_KmA*pyruvate_decarboxylase_KcR*CO2*Pyr*pi/pyruvate_decarboxylase_Kip + pyruvate_decarboxylase_KmP*pyruvate_decarboxylase_KcF*CO2*ADP*OXA/pyruvate_decarboxylase_Kib/pyruvate_decarboxylase_Keq + pyruvate_decarboxylase_KmQ*pyruvate_decarboxylase_KcF*CO2*pi*OXA/pyruvate_decarboxylase_Kib/pyruvate_decarboxylase_Keq));  // ec-code:6.4.1.1
    pyruvate_decarboxylase_KmA = 0.00011; pyruvate_decarboxylase_KmB = 0.00163; pyruvate_decarboxylase_KmC = 0.00037; pyruvate_decarboxylase_KmP = 0.016; pyruvate_decarboxylase_KmQ = 0.00024; pyruvate_decarboxylase_KmR = 5.1e-5; pyruvate_decarboxylase_Keq = 9; pyruvate_decarboxylase_Kia = 0.00015; pyruvate_decarboxylase_Kib = 0.0016; pyruvate_decarboxylase_Kic = 0.00013; pyruvate_decarboxylase_Kip = 0.0079; pyruvate_decarboxylase_Kiq = 0.00019; pyruvate_decarboxylase_Kir = 0.00024; pyruvate_decarboxylase_KcF = 200; pyruvate_decarboxylase_KcR = 20; v36_PC = 3.8617e-7;
  v37: G3P + FAD => FADH2 + DHAP; CYTOPLASM*(v37_V*v37_GUT2P*G3P/(v37_K + G3P)); v37 is "glycerol-3-phosphate dehydrogenase (FAD dependent)";  // ec-code:1.1.99.5
    v37_K = 3.4e-5; v37_V = 3.99e-8; v37_GUT2P = 0.001;
  v38: NADH_cyt + DHAP => G3P + NAD; CYTOPLASM*(v38_V*v38_GUT2P*NADH_cyt/(v38_K + NADH_cyt)); v38 is "glycerol-3-phosphate dehydrogenase (NAD+ dependent)";  // ec-code:1.1.1.8
    v38_K = 34; v38_V = 0.0399; v38_GUT2P = 0.001;
  v40: ADP_cyt => ADP; MATRIX*(v40_V*v40_AAC*ADP_cyt/(v40_K + ADP_cyt)); v40 is "ATP/ADP carrier";  // isVersionOf GO:0015217
    v40_V = 0.1667; v40_K = 0.012; v40_AAC = 0.00033211;
  v41: IsoCitcyt + NADP_cyt -> OG_cyt + NADPH_cyt; CYTOPLASM*v41_IDHc*(IsoCitcyt*NADP_cyt/(phi0*IsoCitcyt*NADP_cyt + phi1*NADP_cyt + phi2*IsoCitcyt + phi12) - OG_cyt*NADPH_cyt*CO2/(phir0*OG_cyt*NADPH_cyt*CO2 + phir1*NADPH_cyt*CO2 + phir2*OG_cyt*CO2 + phir3*OG_cyt*NADPH_cyt + phir12*CO2 + phir13*NADPH_cyt + phir23*OG_cyt + phir123)); v41 is "cytosolic isocitrate dehydrogenase";  // modifiers: CO2; ec-code:1.1.1.42
    phi0 = 0.051; phi1 = 9.5e-8; phi2 = 9.6e-7; phi12 = 9e-8; phir0 = 0.066; phir1 = 3.7e-7; phir2 = 2.9e-5; phir3 = 0.00025; phir12 = 6e-12; phir13 = 1.3e-10; phir23 = 9.4e-8; phir123 = 4.6e-14; v41_IDHc = 3.8617e-7;
  v42: IsoCitcyt + Mal -> Mal_cyt + IsoCit; MATRIX*((IsoCitcyt*Mal/v42_alpha/v42_KiS1/v42_KiS2*v42_KcF - Mal_cyt*IsoCit/v42_beta/v42_KiP1/v42_KiP2*v42_KcR)*v42_CIC/(1 + IsoCitcyt/v42_KiS1 + Mal/v42_KiS2 + Mal_cyt/v42_KiP1 + IsoCit/v42_KiP2 + IsoCitcyt*Mal/v42_alpha/v42_KiS1/v42_KiS2 + Mal_cyt*IsoCit/v42_beta/v42_KiP1/v42_KiP2 + Mal*IsoCit/v42_gamma/v42_KiS2/v42_KiP2 + IsoCitcyt*Mal_cyt/v42_delta/v42_KiS1/v42_KiP1)); v42 is "citrate carrier";  // isVersionOf GO:0006843
    v42_KiS1 = 0.00013; v42_KiS2 = 0.00044; v42_KiP1 = 0.00033; v42_KiP2 = 4.18e-5; v42_KcF = 5.6; v42_KcR = 3.5; v42_alpha = 1; v42_beta = 1; v42_gamma = 1; v42_delta = 1; v42_CIC = 0.00033211;
  v43: ATP => ATP_cyt; MATRIX*(v43_V*v43_AAC*ATP/(v43_K + ATP)); v43 is "ATP/ADP carrier";  // isVersionOf GO:0005347
    v43_V = 1.11667; v43_K = 0.005; v43_AAC = 0.00033211;
  v39: Mal_cyt + NADP_cyt -> NADPH_cyt + PYR_cyt; CYTOPLASM*(v39_MDH*v39_Kcat*Mal_cyt*NADP_cyt/((Kmal + Mal_cyt)*(Knadp + NADP_cyt))); v39 is "malate dehydrogenase (oxaloacetate-decarboxylating) (NADP+)";  // ec-code:1.1.1.40
    v39_Kcat = 0.333; Kmal = 0.000125; Knadp = 0.011; v39_MDH = 3.8617e-7;
  v44: Mal + NADP_p -> NADPH + Pyr; MATRIX*(v44_MDH*v44_Kcat*Mal/(v44_Km + Mal)); v44 is "malate dehydrogenase (oxaloacetate-decarboxylating) (NADP+)";  // ec-code:1.1.1.40
    v44_Kcat = 130.5; v44_Km = 0.01295; v44_MDH = 3.8617e-7;
end
