// SBML level 2 version 3

model model()

  // Compartments:
  compartment c = 1;

  // Species:
  species ATP_c in c = -435.146;  // 3dmet:B01125 kegg.compound:C00002 CHEBI:15422 pubchem.substance:3304
  species beta_D_fructofuranose_6_phosphate_c in c = -435.146; beta_D_fructofuranose_6_phosphate_c is "beta-D-fructofuranose 6-phosphate";  // 3dmet:B01846 kegg.compound:C05345 CHEBI:16084 pubchem.substance:7723
  species ADP_c in c = -435.146;  // 3dmet:B01130 kegg.compound:C00008 CHEBI:16761 pubchem.substance:3310
  species beta_D_fructofuranose_1_6_bisphosphate_c in c = -435.146; beta_D_fructofuranose_1_6_bisphosphate_c is "beta-D-fructofuranose 1,6-bisphosphate";  // 3dmet:B01851 kegg.compound:C05378 CHEBI:28013 pubchem.substance:7752
  species enzyme_R04779_c in c = 0;

  // Parameters:
  temp = 300;
  R = 8.31;
  scp_ATP_c = -2292;
  scp_beta_D_fructofuranose_6_phosphate_c = -1380;
  scp_ADP_c = -1496;
  scp_beta_D_fructofuranose_1_6_bisphosphate_c = -2206;
  temp = 300;
  R = 8.31;
  scp_ATP_c = -435.146;
  scp_beta_D_fructofuranose_6_phosphate_c = -435.146;
  scp_ADP_c = -435.146;
  scp_beta_D_fructofuranose_1_6_bisphosphate_c = -435.146;

  // Reactions:
  _6_phosphofructokinase_activity: ATP_c + beta_D_fructofuranose_6_phosphate_c -> ADP_c + beta_D_fructofuranose_1_6_bisphosphate_c; kcrg_R04779*(exp(-hco_R04779*(scp_ADP_c + scp_beta_D_fructofuranose_1_6_bisphosphate_c - (scp_ATP_c + scp_beta_D_fructofuranose_6_phosphate_c))/(2*R*temp))*ATP_c*beta_D_fructofuranose_6_phosphate_c - exp(hco_R04779*(scp_ADP_c + scp_beta_D_fructofuranose_1_6_bisphosphate_c - (scp_ATP_c + scp_beta_D_fructofuranose_6_phosphate_c))/(2*R*temp))*ADP_c*beta_D_fructofuranose_1_6_bisphosphate_c)/sqrt(kmc_R04779_ATP_c*kmc_R04779_beta_D_fructofuranose_6_phosphate_c*kmc_R04779_ADP_c*kmc_R04779_beta_D_fructofuranose_1_6_bisphosphate_c)/((1 + ATP_c/kmc_R04779_ATP_c)*(1 + beta_D_fructofuranose_6_phosphate_c/kmc_R04779_beta_D_fructofuranose_6_phosphate_c) + (1 + ADP_c/kmc_R04779_ADP_c)*(1 + beta_D_fructofuranose_1_6_bisphosphate_c/kmc_R04779_beta_D_fructofuranose_1_6_bisphosphate_c) - 1);  // kegg.reaction:R04779
    kcrg_R04779 = 0.02; kmc_R04779_ATP_c = 0.5; kmc_R04779_beta_D_fructofuranose_6_phosphate_c = 0.5; kmc_R04779_ADP_c = 0.2; kmc_R04779_beta_D_fructofuranose_1_6_bisphosphate_c = 0.5; hco_R04779 = 1;
end
